# Dados ilustrativos: Electricidade mistura / ไฟฟ้า ภาพรวมไฟฟ้า / Fiktiver Datensatz: Strommix; Wechselstrom / Currente alternante; กระแสไฟฟ้าเฉลี่ยยึดตลาด ณ ผู้บริโภค / Verbrauchsmix, beim Verbraucher / mistura de consumo, ão consumador; 220 V

Dataset: ILCD process, Partly terminated system
Geography: DE
Sub-locations: DE
Reference year: 1999
Valid until: 2004
Classification: Energy carriers and technologies / Electricity
Synonyms: Elektrischer Strom; Elektrizität; Strom
Functional unit: Provision of 1 MJ electricity (AC) at 220 V to the consumer
LCI method principle: Attributional
LCI method approaches: Allocation - market value; Allocation - ability to bear
Completeness: All relevant flows quantified
Share of supply or production covered: 95 %
Included processes: Steinkohle Kraftwerk; Braunkohle Kraftwerk; Erdgas Kraftwerk; Wind Kraftwerk; Heizöl Kraftwerk
Method details: Sachinventar Methodologie-Report der Fa. XY Consult, 2000; Another LCI methodology report (DOC)
Project: Internet Site für Life Cycle Assessment Tools und Services und Life Cycle Inventory Data zur Unterstützung der europäischen Integrierten Product Politik (IPP)
Generated by: XY consulting Ltd.
Registration number: 1-2454-341
Owner: ELECTRIC Association
Compliance: ILCD Compliance
Review: Dependent internal review by XY Consultants Ltd., LCA-Authority Organization ABC
Data quality: Technological representativeness: Very good; Geographical representativeness: Very good
Amounts: no units in this file; such an amount is in the reference unit of its flow, which a separate flow dataset defines
copyright: true
licenseType: Free of charge for all users and uses
accessRestrictions: None, but when using the data set, reference to the owner of data set is to be provided by citing the entry in the respective
"ownership" contact data set.
accessRestrictions: Keine, aber wenn der Datensatz benutzt wird, muss eine Referenz auf den Eigentümer gesetzt werden.

## General comment
Hervorragende Datenqualität.

## Geography
Durschschnittliche Daten für Deutschland

## Sub-locations
Durchschnittliche Daten für Deutschland, keine speziellen Daten für inviduelle Unterregionen

## Time period
Ganzjährig; Durchschnitt über saisonale Variationen

## Technology and included processes
Der Elektrizitätskonsummix besteht aus 25,57 % Steinkohlekraftwerke, 27,57 Braunkohle-Kraftwerke, 35,91 %
Kernkraftwerke, 5,84 % Gaskraftwerke, 0.54 % Erdölkraftwerke, 4,09 % Wasserkraftwerke, 0,31 % Windkraftwerke, 0,46 % Müllverbrennungsanlagen und 0,13 % Biomassekraftwerke.
Andere relevante und inkludierte Prozesse sind Raffinerieprozesse, Energietransport und Extraktionsprozesse

## Technical purpose
Dieser Energiedatensatz kann für kleine bis mittlere elektrische Anwendungsbereiche bei 220 V Wechselstrom eingesetzt
werden.

## Model description
Ganz tolles Model nur für den Test.

## Parameters
- so2: 0.00032; = s*2; max 0.2
  Kalkuliert die SO2 Emission von einem manuell einzugebenden S-Inhalt.
- s: 0.00016; max 0.05
  Schwefelgehalt des Brennstoffs.

## Reference product
- Strom; Wechselstrom; 220 V: 1; measured; allocated 100 % to Strom; Wechselstrom; 220 V

## Inputs
- Erdgas: 0.0041; normal SD95 5 %; measured; allocated 50 % to Strom; Wechselstrom; 220 V
- Steinkohle: 0.0295; min 0.027; max 0.031; uniform; estimated; allocated 100 % to Strom; Wechselstrom; 220 V; source Other source, page 47. (Reference to corresponding data source for the data of the Uniform distribution min and max values)
  Keine brauchbaren Messwerte. Gleichverteilte Werte wurden angenommen, gemäß der Quelle "Other source".
- Heizöl: 0.0013; normal SD95 4 %; measured; allocated 100 % to Strom; Wechselstrom; 220 V
- Braunkohle: 0.1; normal SD95 7 %; estimated; allocated 100 % to Strom; Wechselstrom; 220 V
- Strom; Wechselstrom; 220 V: 0.06; normal SD95 15 %; General reminder flow; estimated; allocated 100 % to Strom; Wechselstrom; 220 V
  Illustrativer Reminder flow des Kraftwerks-internen Elektrizitätsverbrauchs über den Lebensweg Elektrizitätsdatensatz.

## Outputs
All rows: allocated 100 % to Strom; Wechselstrom; 220 V
- Kohlendioxyd - Emissionen in Luft: 0.19; log-normal SD95 4 %; calculated
- Kohlenmonoxid - Emissionen in Luft: 4e-5; log-normal SD95 12 %; measured
- Schwefeldioxid - Emissionen in Luft [RER]: 0.00032; = 0.00032 * so2; log-normal SD95 4 %
  Beispiel für die SO2 Kalkulation in parametrisierten Datensätzen über die Variable so2. ...
- Stickoxide - Emissionen in Luft: 0.00016; log-normal SD95 15 %
- Partikel 0,2 bis 2 µm - Emissionen in Luft: 5e-5; log-normal SD95 20 %; estimated

## Impact indicators
- Super2007 LCIA Methode: 3.14159
  Super2007 single-indicator cradle-to-gate LCIA result of this unit process data set after completing the inventory with the 2005 inventory data
  of the SuPi LCA database.
- another LCIA method: 3.14159

## Deviations from the LCI method principle
Keine

## Modelling constants
Alle Daten, die für die Berechnung des LCI Datensatzes benutzt wurden, beziehen sich auf den Unteren Heizwert. Für den
Energieträgertransport wurde Duchschnittswerte für den Transport mit Schiff, Pipeline, Bahn und Straße benutzt.

## Cut-off and completeness
Cut-off rules for each unit coverage of at least 95 % of mass and energy of the Input and of the Output flows, and 98 % of
their environmental relevance (according to expert judgement).

## Deviations from cut-off and completeness
The coverage for the exploration data is only 90% of mass and energy and 95% of the environmental relevance
(expert judgement).

## Data selection and combination
The data sources for the complete product system are sufficiently consistent: The grid mix data is based on national
statistics. The key emissions, e.g. carbon dioxide, sulphur dioxide, etc., of the power plants are based on measured operating data. All other emissions from the power
plants are based on literature data and/or calculated via energy carrier composition in combination with (literature-based) combustion models. The data on the energy
carrier supply chain is based on statistics with country-wise transport distances and energy carrier composition, as well as industry and literature data on the inventory
of exploration and extraction. Refinery data are based on measurements of major refineries. Grid losses are taken from national statistics. LCI modelling is fully
consistent.

## Data treatment and extrapolations
Energy carrier specific power plants are modelled according to national combustion technology mix. Data measured at
representative power plants for each of the main power plant types have been upscaled to the country mix of power plant
technologies.

## Annual supply or production volume
15000 MWh

## Sampling procedure
Totales jährliches Energietransportvolumen, Emissionsfaktoren von 5 Messungen während des Jahres, Landnutzung über Karten

## Data collection period
1999 bis 2005

## Uncertainty adjustments
keine

## Use advice
Keine besonderen Hinweise, Netzverluste sind eingeschlossen.

## Completeness
Noise-XY-Indicator; A. Braun (2005): A novel method for the integration of noise into LCA. SuperPublishing. 12/2005 pp
23-35.

## Review details
Hier deutsche Beschreibung der Review Details

## Other review details
no further comments after publication were received/documented

## Data sources
- Information über Elektrizität 1995 des ELECTRIC Elektrizitäts-Verbandes
- Eine andere Datenquelle

## Intended applications
Publikation als Hintergrunddatensatz für allen Arten von Studien, mit Ausnahme von publizierten Ökobilanzvergleichen, wofür ein
Unbhängiges Externes Review benötigt wird.
